// COMSOL Multiphysics 5.2.0.166 model "pcp_circular.mph"
// Outline of the model tree

Parameters
  s1_1 = 1
  s1_2 = 0
  n1_1 = 0
  n1_2 = 1
  s2_1 = 0
  s2_2 = 1
  n2_1 = -1
  n2_2 = 0
  bphi = 1[fJ*s/(nm)^3]
  mvmax = 1[(nm)^3/(fJ*s)]
  mvmin = 1e-09[(nm)^3/(fJ*s)]
  thetac = 30[deg]
  alphasq = 0.0053[fJ/nm]
  epsisq = 0.00021333[fJ/nm]
  gamma = 300[nm]
  sv = 0.0017[fJ/(nm)^2]
  e0 = 0.0021[fJ/(nm)^3]
  delrhosq = 1e-9[1/(nm)^2]
  g = 0.1e1[fJ*s/nm]
  lam = 0.09515e0[fJ/(nm)^3]
  mu = 0.044776e0[fJ/(nm)^3]

Functions
  an2: Analytic "Initial plastic rotation" | funcname = mytheta_circular; expr = thetac*(-1+ 2/(1+exp((-sqrt(x^2+y^2)+20.0)*2.5))); args = {x, y}; argunit = nm; fununit = 1
  extm1: MATLAB "latticeRotation" | funcs = {latticeRotation, "arg1,arg2,arg3,arg4"}

Variables
  var1 "Variables 1"
    H31 = G31  // 31 component of H
    H32 = G32  // 32 component of H
    dH31dG11 = 0  // Derivative dH31/dG11
    dH31dG12 = 0  // Derivative dH31/dG12
    dH31dG13 = 0  // Derivative dH31/dG13
    dH31dG21 = 0  // Derivative dH31/dG21
    dH31dG22 = 0  // Derivative dH31/dG22
    dH31dG23 = 0  // Derivative dH31/dG23
    dH31dG31 = 1  // Derivative dH31/dG31
    dH31dG32 = 0  // Derivative dH31/dG32
    dH31dG33 = 0  // Derivative dH31/dG33
    dH32dG11 = 0  // Derivative dH32/dG11
    dH32dG12 = 0  // Derivative dH32/dG12
    dH32dG13 = 0  // Derivative dH32/dG13
    dH32dG21 = 0  // Derivative dH32/dG21
    dH32dG22 = 0  // Derivative dH32/dG22
    dH32dG23 = 0  // Derivative dH32/dG23
    dH32dG31 = 0  // Derivative dH32/dG31
    dH32dG32 = 1  // Derivative dH32/dG32
    dH32dG33 = 0  // Derivative dH32/dG33
    absrho = (delrhosq+H31^2+H32^2)^(1/2)  // Absoloute value of the gradient of rotation
    rhosquare = delrhosq+H31^2+H32^2  // square of the absoloute value of the gradient of rotation
    w_el = (lam*(4*Ee11+4*Ee22+2*(Ee11+Ee22)^2-2*Ee11^2-2*Ee22^2-4*Ee12*Ee21+3))/8-(3*mu)/2-(lam/8-mu/2)*(2*Ee11+2*Ee22+3)-lam/8-log(2*Ee11+2*Ee22+4*Ee11*Ee22-4*Ee12*Ee21+1)*(lam/4+mu/2)+(lam*(2*Ee11+2*Ee22+4*Ee11*Ee22-4*Ee12*Ee21+1))/8  // Elastic energy
    w_phi = (alphasq*(phix^2+phiy^2))/2+e0*(phi-1)^2  // phi energy
    w_theta = (epsisq*(delrhosq+H31^2+H32^2))/2+phi^2*sv*(log(cosh(gamma*(delrhosq+H31^2+H32^2)^(1/2)))/gamma-log(cosh(delrhosq^(1/2)*gamma))/gamma)  // theta energy
    w = (lam*(4*Ee11+4*Ee22+2*(Ee11+Ee22)^2-2*Ee11^2-2*Ee22^2-4*Ee12*Ee21+3))/8-(3*mu)/2-(lam/8-mu/2)*(2*Ee11+2*Ee22+3)-lam/8-log(2*Ee11+2*Ee22+4*Ee11*Ee22-4*Ee12*Ee21+1)*(lam/4+mu/2)+(lam*(2*Ee11+2*Ee22+4*Ee11*Ee22-4*Ee12*Ee21+1))/8+(alphasq*(phix^2+phiy^2))/2+(epsisq*(delrhosq+H31^2+H32^2))/2+e0*(phi-1)^2+phi^2*sv*(log(cosh(gamma*(delrhosq+H31^2+H32^2)^(1/2)))/gamma-log(cosh(delrhosq^(1/2)*gamma))/gamma)  // total energy
    mv = (mvmin+(1-phi^3*(10-15*phi+6*phi^2))*(mvmax-mvmin))  // slip mobility
    bv = 1/mv  // inverse slip mobility
    dwdH31 = H31*epsisq+(H31*phi^2*sv*sinh(gamma*(delrhosq+H31^2+H32^2)^(1/2)))/(cosh(gamma*(delrhosq+H31^2+H32^2)^(1/2))*(delrhosq+H31^2+H32^2)^(1/2))  // dw/dH31
    dwdH32 = H32*epsisq+(H32*phi^2*sv*sinh(gamma*(delrhosq+H31^2+H32^2)^(1/2)))/(cosh(gamma*(delrhosq+H31^2+H32^2)^(1/2))*(delrhosq+H31^2+H32^2)^(1/2))  // dw/dH32
    W11 = mu-lam/4+(lam*(4*Ee22+2))/8+(lam*(4*Ee22+4))/8-((4*Ee22+2)*(lam/4+mu/2))/(2*Ee11+2*Ee22+4*Ee11*Ee22-4*Ee12*Ee21+1)  // intermediate stress, component 11
    W12 = (4*Ee21*(lam/4+mu/2))/(2*Ee11+2*Ee22+4*Ee11*Ee22-4*Ee12*Ee21+1)-Ee21*lam  // intermediate stress, component 12
    W21 = (4*Ee12*(lam/4+mu/2))/(2*Ee11+2*Ee22+4*Ee11*Ee22-4*Ee12*Ee21+1)-Ee12*lam  // intermediate stress, component 21
    W22 = mu-lam/4+(lam*(4*Ee11+2))/8+(lam*(4*Ee11+4))/8-((4*Ee11+2)*(lam/4+mu/2))/(2*Ee11+2*Ee22+4*Ee11*Ee22-4*Ee12*Ee21+1)  // intermediate stress, component 22
    tt11 = dwdH31*dH31dG11+dwdH32*dH32dG11  // derivative dw/dG11
    tt12 = dwdH31*dH31dG12+dwdH32*dH32dG12  // derivative dw/dG12
    tt13 = dwdH31*dH31dG13+dwdH32*dH32dG13  // derivative dw/dG13
    tt21 = dwdH31*dH31dG21+dwdH32*dH32dG21  // derivative dw/dG21
    tt22 = dwdH31*dH31dG22+dwdH32*dH32dG22  // derivative dw/dG22
    tt23 = dwdH31*dH31dG23+dwdH32*dH32dG23  // derivative dw/dG23
    tt31 = dwdH31*dH31dG31+dwdH32*dH32dG31  // derivative dw/dG31
    tt32 = dwdH31*dH31dG32+dwdH32*dH32dG32  // derivative dw/dG32
    tt33 = dwdH31*dH31dG33+dwdH32*dH32dG33  // derivative dw/dG33
    dwdphi = e0*(2*phi-2)+2*phi*sv*(log(cosh(gamma*(delrhosq+H31^2+H32^2)^(1/2)))/gamma-log(cosh(delrhosq^(1/2)*gamma))/gamma)  // dw/dphi
    Rp11 = cos(theta)  // Rp, component 11
    Rp12 = -sin(theta)  // Rp, component 12
    Rp21 = sin(theta)  // Rp, component 21
    Rp22 = cos(theta)  // Rp, component 22
    Fp11 = Up11*cos(theta)-Up12*sin(theta)  // Fp, component 11
    Fp12 = Up12*cos(theta)-Up22*sin(theta)  // Fp, component 12
    Fp21 = Up12*cos(theta)+Up11*sin(theta)  // Fp, component 21
    Fp22 = Up22*cos(theta)+Up12*sin(theta)  // Fp, component 22
    Fp13 = 0  // Fp component 13
    Fp31 = 0  // Fp component 31
    Fp23 = 0  // Fp component 23
    Fp32 = 0  // Fp component 32
    Fp33 = 1  // Fp component 33
    da11 = -Up12*cos(theta)-Up11*sin(theta)  // da, component 11
    da12 = cos(theta)  // da, component 12
    da13 = -sin(theta)  // da, component 13
    da14 = 0  // da, component 14
    da21 = -Up22*cos(theta)-Up12*sin(theta)  // da, component 21
    da22 = 0  // da, component 22
    da23 = cos(theta)  // da, component 23
    da24 = -sin(theta)  // da, component 24
    da31 = Up11*cos(theta)-Up12*sin(theta)  // da, component 31
    da32 = sin(theta)  // da, component 32
    da33 = cos(theta)  // da, component 33
    da34 = 0  // da, component 34
    da41 = Up12*cos(theta)-Up22*sin(theta)  // da, component 41
    da42 = 0  // da, component 42
    da43 = sin(theta)  // da, component 43
    da44 = cos(theta)  // da, component 44
    Jp = Fp11*Fp22-Fp12*Fp21  // determinant of Fp
    Gp11 = (Fp22)/Jp  // inverse Fp, component 11
    Gp21 = (-Fp21)/Jp  // inverse Fp, component 21
    Gp12 = (-Fp12)/Jp  // inverse Fp, component 12
    Gp22 = (Fp11)/Jp  // inverse Fp, component 22
    F11 = u1x+1  // deformation gradient, component 11
    F12 = u1y+0  // deformation gradient, component 12
    F21 = u2x+0  // deformation gradient, component 21
    F22 = u2y+1  // deformation gradient, component 22
    Fe11 = +F11*Gp11+F12*Gp21  // elastic distortion, component 11
    Fe12 = +F11*Gp12+F12*Gp22  // elastic distortion, component 12
    Fe21 = +F21*Gp11+F22*Gp21  // elastic distortion, component 21
    Fe22 = +F21*Gp12+F22*Gp22  // elastic distortion, component 22
    Ce11 = +Fe11*Fe11+Fe21*Fe21  // left CG stretch tensor, component 11
    Ce12 = +Fe11*Fe12+Fe21*Fe22  // left CG stretch tensor, component 12
    Ce21 = +Fe12*Fe11+Fe22*Fe21  // left CG stretch tensor, component 21
    Ce22 = +Fe12*Fe12+Fe22*Fe22  // left CG stretch tensor, component 22
    Ee11 = 0.5*Ce11-0.5*1  // elastic strain, component 11
    Ee12 = 0.5*Ce12-0.5*0  // elastic strain, component 12
    Ee21 = 0.5*Ce21-0.5*0  // elastic strain, component 21
    Ee22 = 0.5*Ce22-0.5*1  // elastic strain, component 22
    P11 = +Fe11*W11*Gp11+Fe11*W12*Gp12+Fe12*W21*Gp11+Fe12*W22*Gp12  // first Piola stress, component 11
    P12 = +Fe11*W11*Gp21+Fe11*W12*Gp22+Fe12*W21*Gp21+Fe12*W22*Gp22  // first Piola stress, component 12
    P21 = +Fe21*W11*Gp11+Fe21*W12*Gp12+Fe22*W21*Gp11+Fe22*W22*Gp12  // first Piola stress, component 21
    P22 = +Fe21*W11*Gp21+Fe21*W12*Gp22+Fe22*W21*Gp21+Fe22*W22*Gp22  // first Piola stress, component 22
    rss1 = +W11*n1_1*Ce11*s1_1+W11*n1_1*Ce12*s1_2+W12*n1_2*Ce11*s1_1+W12*n1_2*Ce12*s1_2+W21*n1_1*Ce21*s1_1+W21*n1_1*Ce22*s1_2+W22*n1_2*Ce21*s1_1+W22*n1_2*Ce22*s1_2  // Resolved shear stress 1
    rss2 = +W11*n2_1*Ce11*s2_1+W11*n2_1*Ce12*s2_2+W12*n2_2*Ce11*s2_1+W12*n2_2*Ce12*s2_2+W21*n2_1*Ce21*s2_1+W21*n2_1*Ce22*s2_2+W22*n2_2*Ce21*s2_1+W22*n2_2*Ce22*s2_2  // Resolved shear stress 2
    Lp11 = +v1*s1_1*n1_1+v2*s2_1*n2_1  // Lp, component 11
    Lp12 = +v1*s1_1*n1_2+v2*s2_1*n2_2  // Lp, component 12
    Lp21 = +v1*s1_2*n1_1+v2*s2_2*n2_1  // Lp, component 21
    Lp22 = +v1*s1_2*n1_2+v2*s2_2*n2_2  // Lp, component 22
    LpFp11 = +Lp11*Fp11+Lp12*Fp21  // LpFp, component 11
    LpFp12 = +Lp11*Fp12+Lp12*Fp22  // LpFp, component 12
    LpFp21 = +Lp21*Fp11+Lp22*Fp21  // LpFp, component 21
    LpFp22 = +Lp21*Fp12+Lp22*Fp22  // LpFp, component 22
    Xi_phi_1 = alphasq*phix  // component 1 of the back stress Xi_phi_2
    Xi_phi_2 = alphasq*phiy  // component 2 of the back stress Xi_phi_2
    Xi_en1_1 = Jp*(+Gp11*0*n1_1*tt11*s1_1+Gp11*0*n1_1*tt12*s1_2+Gp11*0*n1_1*tt21*s1_1+Gp11*0*n1_1*tt22*s1_2+Gp11*0*n1_1*tt31*s1_1+Gp11*0*n1_1*tt32*s1_2+Gp11*0*n1_2*tt11*s1_1+Gp11*0*n1_2*tt12*s1_2+Gp11*0*n1_2*tt21*s1_1+Gp11*0*n1_2*tt22*s1_2+Gp11*1*n1_2*tt31*s1_1+Gp11*1*n1_2*tt32*s1_2+Gp12*0*n1_1*tt11*s1_1+Gp12*0*n1_1*tt12*s1_2+Gp12*0*n1_1*tt21*s1_1+Gp12*0*n1_1*tt22*s1_2+Gp12*-1*n1_1*tt31*s1_1+Gp12*-1*n1_1*tt32*s1_2+Gp12*0*n1_2*tt11*s1_1+Gp12*0*n1_2*tt12*s1_2+Gp12*0*n1_2*tt21*s1_1+Gp12*0*n1_2*tt22*s1_2+Gp12*0*n1_2*tt31*s1_1+Gp12*0*n1_2*tt32*s1_2)  // component 1 of the energetic back stress Xi_en1
    Xi_en1_2 = Jp*(+Gp21*0*n1_1*tt11*s1_1+Gp21*0*n1_1*tt12*s1_2+Gp21*0*n1_1*tt21*s1_1+Gp21*0*n1_1*tt22*s1_2+Gp21*0*n1_1*tt31*s1_1+Gp21*0*n1_1*tt32*s1_2+Gp21*0*n1_2*tt11*s1_1+Gp21*0*n1_2*tt12*s1_2+Gp21*0*n1_2*tt21*s1_1+Gp21*0*n1_2*tt22*s1_2+Gp21*1*n1_2*tt31*s1_1+Gp21*1*n1_2*tt32*s1_2+Gp22*0*n1_1*tt11*s1_1+Gp22*0*n1_1*tt12*s1_2+Gp22*0*n1_1*tt21*s1_1+Gp22*0*n1_1*tt22*s1_2+Gp22*-1*n1_1*tt31*s1_1+Gp22*-1*n1_1*tt32*s1_2+Gp22*0*n1_2*tt11*s1_1+Gp22*0*n1_2*tt12*s1_2+Gp22*0*n1_2*tt21*s1_1+Gp22*0*n1_2*tt22*s1_2+Gp22*0*n1_2*tt31*s1_1+Gp22*0*n1_2*tt32*s1_2)  // component 2 of the energetic back stress Xi_en1
    Xi_en2_1 = Jp*(+Gp11*0*n2_1*tt11*s2_1+Gp11*0*n2_1*tt12*s2_2+Gp11*0*n2_1*tt21*s2_1+Gp11*0*n2_1*tt22*s2_2+Gp11*0*n2_1*tt31*s2_1+Gp11*0*n2_1*tt32*s2_2+Gp11*0*n2_2*tt11*s2_1+Gp11*0*n2_2*tt12*s2_2+Gp11*0*n2_2*tt21*s2_1+Gp11*0*n2_2*tt22*s2_2+Gp11*1*n2_2*tt31*s2_1+Gp11*1*n2_2*tt32*s2_2+Gp12*0*n2_1*tt11*s2_1+Gp12*0*n2_1*tt12*s2_2+Gp12*0*n2_1*tt21*s2_1+Gp12*0*n2_1*tt22*s2_2+Gp12*-1*n2_1*tt31*s2_1+Gp12*-1*n2_1*tt32*s2_2+Gp12*0*n2_2*tt11*s2_1+Gp12*0*n2_2*tt12*s2_2+Gp12*0*n2_2*tt21*s2_1+Gp12*0*n2_2*tt22*s2_2+Gp12*0*n2_2*tt31*s2_1+Gp12*0*n2_2*tt32*s2_2)  // component 1 of the energetic back stress Xi_en2
    Xi_en2_2 = Jp*(+Gp21*0*n2_1*tt11*s2_1+Gp21*0*n2_1*tt12*s2_2+Gp21*0*n2_1*tt21*s2_1+Gp21*0*n2_1*tt22*s2_2+Gp21*0*n2_1*tt31*s2_1+Gp21*0*n2_1*tt32*s2_2+Gp21*0*n2_2*tt11*s2_1+Gp21*0*n2_2*tt12*s2_2+Gp21*0*n2_2*tt21*s2_1+Gp21*0*n2_2*tt22*s2_2+Gp21*1*n2_2*tt31*s2_1+Gp21*1*n2_2*tt32*s2_2+Gp22*0*n2_1*tt11*s2_1+Gp22*0*n2_1*tt12*s2_2+Gp22*0*n2_1*tt21*s2_1+Gp22*0*n2_1*tt22*s2_2+Gp22*-1*n2_1*tt31*s2_1+Gp22*-1*n2_1*tt32*s2_2+Gp22*0*n2_2*tt11*s2_1+Gp22*0*n2_2*tt12*s2_2+Gp22*0*n2_2*tt21*s2_1+Gp22*0*n2_2*tt22*s2_2+Gp22*0*n2_2*tt31*s2_1+Gp22*0*n2_2*tt32*s2_2)  // component 2 of the energetic back stress Xi_en2
    Xi_diss1_1 = g*v1x  // component 1 of the dissipative back stress Xi_diss1
    Xi_diss1_2 = g*v1y  // component 1 of the dissipative back stress Xi_diss1
    Xi_diss2_1 = g*v2x  // component 2 of the dissipative back stress Xi_diss2
    Xi_diss2_2 = g*v2y  // component 2 of the dissipative back stress Xi_diss2
    Xi1_1 = Xi_en1_1+Xi_diss1_1  // component 1 of the total back stress Xi1
    Xi1_2 = Xi_en1_2+Xi_diss1_2  // component 2 of the total back stress Xi1
    Xi2_1 = Xi_en2_1+Xi_diss2_1  // component 1 of the total back stress Xi2
    Xi2_2 = Xi_en2_2+Xi_diss2_2  // component 2 of the total back stress Xi2
    dotFp11 = +thetat*(-sin(theta))*Up11+Rp11*Up11t+thetat*(-cos(theta))*Up12+Rp12*Up12t  // dotFp, component 11
    dotFp12 = +thetat*(-sin(theta))*Up12+Rp11*Up12t+thetat*(-cos(theta))*Up22+Rp12*Up22t  // dotFp, component 12
    dotFp21 = +thetat*(cos(theta))*Up11+Rp21*Up11t+thetat*(-sin(theta))*Up12+Rp22*Up12t  // dotFp, component 21
    dotFp22 = +thetat*(cos(theta))*Up12+Rp21*Up12t+thetat*(-sin(theta))*Up22+Rp22*Up22t  // dotFp, component 22
    G11 = (+0*d(Fp11,x)*Fp11+0*d(Fp12,x)*Fp11+0*d(Fp13,x)*Fp11+0*d(Fp11,y)*Fp11+0*d(Fp12,y)*Fp11+1*d(Fp13,y)*Fp11+0*d(Fp11,x)*Fp12+0*d(Fp12,x)*Fp12+-1*d(Fp13,x)*Fp12+0*d(Fp11,y)*Fp12+0*d(Fp12,y)*Fp12+0*d(Fp13,y)*Fp12+0*d(Fp11,x)*Fp13+1*d(Fp12,x)*Fp13+0*d(Fp13,x)*Fp13+-1*d(Fp11,y)*Fp13+0*d(Fp12,y)*Fp13+0*d(Fp13,y)*Fp13)/Jp  // G, component 11
    G12 = (+0*d(Fp21,x)*Fp11+0*d(Fp22,x)*Fp11+0*d(Fp23,x)*Fp11+0*d(Fp21,y)*Fp11+0*d(Fp22,y)*Fp11+1*d(Fp23,y)*Fp11+0*d(Fp21,x)*Fp12+0*d(Fp22,x)*Fp12+-1*d(Fp23,x)*Fp12+0*d(Fp21,y)*Fp12+0*d(Fp22,y)*Fp12+0*d(Fp23,y)*Fp12+0*d(Fp21,x)*Fp13+1*d(Fp22,x)*Fp13+0*d(Fp23,x)*Fp13+-1*d(Fp21,y)*Fp13+0*d(Fp22,y)*Fp13+0*d(Fp23,y)*Fp13)/Jp  // G, component 12
    G13 = (+0*d(Fp31,x)*Fp11+0*d(Fp32,x)*Fp11+0*d(Fp33,x)*Fp11+0*d(Fp31,y)*Fp11+0*d(Fp32,y)*Fp11+1*d(Fp33,y)*Fp11+0*d(Fp31,x)*Fp12+0*d(Fp32,x)*Fp12+-1*d(Fp33,x)*Fp12+0*d(Fp31,y)*Fp12+0*d(Fp32,y)*Fp12+0*d(Fp33,y)*Fp12+0*d(Fp31,x)*Fp13+1*d(Fp32,x)*Fp13+0*d(Fp33,x)*Fp13+-1*d(Fp31,y)*Fp13+0*d(Fp32,y)*Fp13+0*d(Fp33,y)*Fp13)/Jp  // G, component 13
    G21 = (+0*d(Fp11,x)*Fp21+0*d(Fp12,x)*Fp21+0*d(Fp13,x)*Fp21+0*d(Fp11,y)*Fp21+0*d(Fp12,y)*Fp21+1*d(Fp13,y)*Fp21+0*d(Fp11,x)*Fp22+0*d(Fp12,x)*Fp22+-1*d(Fp13,x)*Fp22+0*d(Fp11,y)*Fp22+0*d(Fp12,y)*Fp22+0*d(Fp13,y)*Fp22+0*d(Fp11,x)*Fp23+1*d(Fp12,x)*Fp23+0*d(Fp13,x)*Fp23+-1*d(Fp11,y)*Fp23+0*d(Fp12,y)*Fp23+0*d(Fp13,y)*Fp23)/Jp  // G, component 21
    G22 = (+0*d(Fp21,x)*Fp21+0*d(Fp22,x)*Fp21+0*d(Fp23,x)*Fp21+0*d(Fp21,y)*Fp21+0*d(Fp22,y)*Fp21+1*d(Fp23,y)*Fp21+0*d(Fp21,x)*Fp22+0*d(Fp22,x)*Fp22+-1*d(Fp23,x)*Fp22+0*d(Fp21,y)*Fp22+0*d(Fp22,y)*Fp22+0*d(Fp23,y)*Fp22+0*d(Fp21,x)*Fp23+1*d(Fp22,x)*Fp23+0*d(Fp23,x)*Fp23+-1*d(Fp21,y)*Fp23+0*d(Fp22,y)*Fp23+0*d(Fp23,y)*Fp23)/Jp  // G, component 22
    G23 = (+0*d(Fp31,x)*Fp21+0*d(Fp32,x)*Fp21+0*d(Fp33,x)*Fp21+0*d(Fp31,y)*Fp21+0*d(Fp32,y)*Fp21+1*d(Fp33,y)*Fp21+0*d(Fp31,x)*Fp22+0*d(Fp32,x)*Fp22+-1*d(Fp33,x)*Fp22+0*d(Fp31,y)*Fp22+0*d(Fp32,y)*Fp22+0*d(Fp33,y)*Fp22+0*d(Fp31,x)*Fp23+1*d(Fp32,x)*Fp23+0*d(Fp33,x)*Fp23+-1*d(Fp31,y)*Fp23+0*d(Fp32,y)*Fp23+0*d(Fp33,y)*Fp23)/Jp  // G, component 23
    G31 = (+0*d(Fp11,x)*Fp31+0*d(Fp12,x)*Fp31+0*d(Fp13,x)*Fp31+0*d(Fp11,y)*Fp31+0*d(Fp12,y)*Fp31+1*d(Fp13,y)*Fp31+0*d(Fp11,x)*Fp32+0*d(Fp12,x)*Fp32+-1*d(Fp13,x)*Fp32+0*d(Fp11,y)*Fp32+0*d(Fp12,y)*Fp32+0*d(Fp13,y)*Fp32+0*d(Fp11,x)*Fp33+1*d(Fp12,x)*Fp33+0*d(Fp13,x)*Fp33+-1*d(Fp11,y)*Fp33+0*d(Fp12,y)*Fp33+0*d(Fp13,y)*Fp33)/Jp  // G, component 31
    G32 = (+0*d(Fp21,x)*Fp31+0*d(Fp22,x)*Fp31+0*d(Fp23,x)*Fp31+0*d(Fp21,y)*Fp31+0*d(Fp22,y)*Fp31+1*d(Fp23,y)*Fp31+0*d(Fp21,x)*Fp32+0*d(Fp22,x)*Fp32+-1*d(Fp23,x)*Fp32+0*d(Fp21,y)*Fp32+0*d(Fp22,y)*Fp32+0*d(Fp23,y)*Fp32+0*d(Fp21,x)*Fp33+1*d(Fp22,x)*Fp33+0*d(Fp23,x)*Fp33+-1*d(Fp21,y)*Fp33+0*d(Fp22,y)*Fp33+0*d(Fp23,y)*Fp33)/Jp  // G, component 32
    G33 = (+0*d(Fp31,x)*Fp31+0*d(Fp32,x)*Fp31+0*d(Fp33,x)*Fp31+0*d(Fp31,y)*Fp31+0*d(Fp32,y)*Fp31+1*d(Fp33,y)*Fp31+0*d(Fp31,x)*Fp32+0*d(Fp32,x)*Fp32+-1*d(Fp33,x)*Fp32+0*d(Fp31,y)*Fp32+0*d(Fp32,y)*Fp32+0*d(Fp33,y)*Fp32+0*d(Fp31,x)*Fp33+1*d(Fp32,x)*Fp33+0*d(Fp33,x)*Fp33+-1*d(Fp31,y)*Fp33+0*d(Fp32,y)*Fp33+0*d(Fp33,y)*Fp33)/Jp  // G, component 33
    w_kwc = (alphasq*(phi0x^2+phi0y^2))/2+(epsisq*(theta0x^2+theta0y^2))/2+e0*(phi0-1)^2-phi0^2*sv*(log(cosh(delrhosq^(1/2)*gamma))/gamma-log(cosh(gamma*(delrhosq+theta0x^2+theta0y^2)^(1/2)))/gamma)  // total kwc energy
    Xi_phi0_1 = alphasq*phi0x  // component 1 of the back stress Xi_phi0_2
    Xi_phi0_2 = alphasq*phi0y  // component 2 of the back stress Xi_phi0_2
    Xi_theta0_1 = epsisq*theta0x+(phi0^2*sv*theta0x*sinh(gamma*(delrhosq+theta0x^2+theta0y^2)^(1/2)))/(cosh(gamma*(delrhosq+theta0x^2+theta0y^2)^(1/2))*(delrhosq+theta0x^2+theta0y^2)^(1/2))  // component 1 of the back stress Xi_theta0_2
    Xi_theta0_2 = epsisq*theta0y+(phi0^2*sv*theta0y*sinh(gamma*(delrhosq+theta0x^2+theta0y^2)^(1/2)))/(cosh(gamma*(delrhosq+theta0x^2+theta0y^2)^(1/2))*(delrhosq+theta0x^2+theta0y^2)^(1/2))  // component 2 of the back stress Xi_theta0_2
    dw_kwcdphi0 = e0*(2*phi0-2)-2*phi0*sv*(log(cosh(delrhosq^(1/2)*gamma))/gamma-log(cosh(gamma*(delrhosq+theta0x^2+theta0y^2)^(1/2)))/gamma)  // dw_kwc/dphi0
    mtheta0 = (mvmin+(1-phi0^3*(10-15*phi0+6*phi0^2))*(mvmax-mvmin))  // theta0 mobility
    btheta0 = 1/mtheta0  // inverse theta0 mobility
    bphi0 = bphi  // inverse phi0 mobility
    d2wdH312 = epsisq+(H31^2*gamma*phi^2*sv)/(delrhosq+H31^2+H32^2)+(phi^2*sv*sinh(gamma*(delrhosq+H31^2+H32^2)^(1/2)))/(cosh(gamma*(delrhosq+H31^2+H32^2)^(1/2))*(delrhosq+H31^2+H32^2)^(1/2))-(H31^2*phi^2*sv*sinh(gamma*(delrhosq+H31^2+H32^2)^(1/2)))/(cosh(gamma*(delrhosq+H31^2+H32^2)^(1/2))*(delrhosq+H31^2+H32^2)^(3/2))-(H31^2*gamma*phi^2*sv*sinh(gamma*(delrhosq+H31^2+H32^2)^(1/2))^2)/(cosh(gamma*(delrhosq+H31^2+H32^2)^(1/2))^2*(delrhosq+H31^2+H32^2))  // d2w/d(H31)2

Geometry
  geom1 "Geometry 1" (2D, length unit nm)
    r1: Rectangle | base = center; size = {80, 80}
    c1: Circle | r = 20
    fin: Finalize "Form Union"

Physics
  w: WeakFormPDE "Slips" on all domains
    dependent variable v = {v1, v2}
    ShapeProperty.shapeFunctionType = shlag
    ShapeProperty.order = 2
    ShapeProperty.valueType = complex
    Units.DependentVariableQuantity = fluidconductance
    Units.CustomSourceTermUnit = t^-1
    wfeq1: WeakFormPDE (default)
      weak = {+Xi1_1*test(v1x)+Xi1_2*test(v1y)-rss1*test(v1)+(tt31*(G31*s1_1*n1_1+G32*s1_1*n1_2)+tt32*(G31*s1_2*n1_1+G32*s1_2*n1_2))*test(v1)+bv*v1*test(v1), +Xi2_1*test(v2x)+Xi2_2*test(v2y)-rss2*test(v2)+(tt31*(G31*s2_1*n2_1+G32*s2_1*n2_2)+tt32*(G31*s2_2*n2_1+G32*s2_2*n2_2))*test(v2)+bv*v2*test(v2)}
    zflx1: ZeroFluxBoundary "Zero Flux 1" (default)
    init1: init "Initial Values 1" (default) | v1 = 0; v2 = 0; Up11 = 1; Up22 = 1; theta = mytheta(x)
    dir1: DirichletBoundary "Dirichlet Boundary Condition 1" on boundaries 1-4 | r = {0, 0}
  w2: WeakFormPDE "Force balance" on all domains
    dependent variable u = {u1, u2}
    ShapeProperty.shapeFunctionType = shlag
    ShapeProperty.order = 2
    Units.DependentVariableQuantity = length
    wfeq1: WeakFormPDE (default) | weak = {+P11*test(u1x)+P12*test(u1y), +P21*test(u2x)+P22*test(u2y)}
    zflx1: ZeroFluxBoundary "Zero Flux 1" (default)
    init1: init "Initial Values 1" (default) | u2 = 0; u1 = 0
    dir1: DirichletBoundary "Dirichlet Boundary Condition 1" on boundaries 1-4 | r = {0, 0}
    flux1: FluxBoundary "Flux/Source 1" on boundaries 1-4
  dode: DomainODE "Flow rule" on all domains
    dependent variable Fp = {theta, Up11, Up12, Up22}
    ShapeProperty.shapeFunctionType = shlag
    ShapeProperty.order = 2
    Units.CustomSourceTermUnit = 1/s
    dode1: DistributedODE (default)
      f = {LpFp11, LpFp12, LpFp21, LpFp22}
      da = {da11, da21, da31, da41, da12, da22, da32, da42, da13, da23, da33, da43, da14, da24, da34, da44}
    init1: init "Initial Values 1" (default) | theta = mytheta_circular(x,y); Up11 = 1; Up22 = 1
  w3: WeakFormPDE "phi" on all domains
    dependent variable phi
    ShapeProperty.shapeFunctionType = shlag
    ShapeProperty.order = 2
    wfeq1: WeakFormPDE (default) | weak = +Xi_phi_1*test(phix)+Xi_phi_2*test(phiy)+(dwdphi+bphi*phit)*test(phi)
    zflx1: ZeroFluxBoundary "Zero Flux 1" (default)
    init1: init "Initial Values 1" (default) | phi = 1
    dir1: DirichletBoundary "Dirichlet Boundary Condition 1" on boundaries 1-4 | r = 1
  w4: WeakFormPDE "kwc" on all domains
    dependent variable kwc0 = {phi0, theta0}
    wfeq1: WeakFormPDE (default)
      weak = {+Xi_phi0_1*test(phi0x)+Xi_phi0_2*test(phi0y)+(dw_kwcdphi0+bphi0*phi0t)*test(phi0), +Xi_theta0_1*test(theta0x)+Xi_theta0_2*test(theta0y)+btheta0*theta0t*test(theta0)}
    zflx1: ZeroFluxBoundary "Zero Flux 1" (default)
    init1: init "Initial Values 1" (default) | phi0 = 1; theta0 = mytheta_circular(x,y)
    dir1: DirichletBoundary "Dirichlet Boundary Condition 1" on boundaries 1-4 | r = {1, mytheta_circular(x,y)}

Mesh
  mesh1 "Mesh_ge"
    size: MeshSizeDefault | hauto = 7; custom = off
    ftri1: FreeTri "Free Triangular 1" on domains 2
      size1: Size on domains 2 | hauto = 2
    ftri2: FreeTri "Free Triangular 2" on remaining entities
      size1: Size on entire geometry | hauto = 6
      dis1: Distribution (disabled) on boundaries 5-8 | numelem = 20
  mesh2 "Mesh_kwc"
    size: MeshSizeDefault | hauto = 2
    ftri1: FreeTri "Free Triangular 1" on domains 2
      size1: Size on domains 2 | hauto = 3
    ftri2: FreeTri "Free Triangular 2" on domains 1
      size1: Size on domains 1 | hauto = 6

Studies
  std1 "kwc_study"
    time: Transient "Time Dependent"
      tlist = range(0,1e5,1e7)
      physselection = w
      solve for = {w4}
      useinitsol = on
      initmethod = init
      initstudy = zero
      usesol = on
      mesh = {geom1, mesh1}
  std2 "ge_study"
    time: Transient "Time Dependent"
      tlist = range(0,1e4,5e6)
      physselection = w
      solve for = {w, w2, dode, w3}
      useinitsol = on
      initmethod = init
      initstudy = zero
      usesol = on
      notsolmethod = init
      notstudy = zero
      autoremesh = on

Solver configurations
  sol1 "Solution 1" (study std1)
    v1: Variables "Dependent Variables 1"
    t1: Time "Time-Dependent Solver 1" | tlist = range(0,1e5,1e7)
      dDef: Direct
      fc1: FullyCoupled | linsolver = dDef
  sol2 "Solution 2" (study std2)
    v1: Variables "Dependent Variables 1" | scalemethod = auto
      comp1_v1: Field "Dependent variable v1 (comp1.v1)" | scaleval = 1e-5
      comp1_v2: Field "Dependent variable v2 (comp1.v2)" | scaleval = 1e-5
      comp1_u1: Field "Dependent variable u1 (comp1.u1)" | scaleval = 1e-14
      comp1_u2: Field "Dependent variable u2 (comp1.u2)" | scaleval = 1e-14
    t1: Time "Time-Dependent Solver 1"
      tlist = range(0,1e4,5e6)
      rtol = 0.01
      atolglobal = 0.001
      fieldselection = comp1_Up11
      dDef: Direct
      se1: Segregated | segstabacc = segaacc
        ssDef: SegregatedStep | segvar = {comp1_u1, comp1_u2}; segvarspec = all
        ss1: SegregatedStep | segvar = {comp1_Up11, comp1_Up12, comp1_theta, comp1_Up22}
        ss2: SegregatedStep | segvar = {comp1_v1, comp1_v2}
        ss3: SegregatedStep | segvar = {comp1_phi}
      prob1: SolverProblem "Information 1"
        error1: SolverError "Error 1"